i := 0 .. 10
B := 2.5
t := 0, 0.1 .. 10
Y_start := 430.1
r := 0.3
C0 := Y_start*r
Y_model(t) := (Y_start - C0/(B*r - 1))*e^((r*t)/(B*r - 1)) + C0/(B*r - 1)
Y := [430.1; 442.6; 381.9; 395.8; 417.2; 455.0; 445.1; 435.2; 480.4; 470.9; 519.3]
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